// SBML level 3 version 1

model __main()

  // Compartments:
  compartment default_compartment = 1;

  // Species:
  species D in default_compartment = 0;
  species E in default_compartment = E0;
  species Ev in default_compartment = 0;
  species V in default_compartment = 10;
  species Tc in default_compartment = 0;
  species Da in default_compartment = 0;
  species Dm in default_compartment = 0;
  species Th1 in default_compartment = 10;
  species Th2 in default_compartment = 10;
  species B in default_compartment = 0;
  species Pss in default_compartment = 0;
  species Psn in default_compartment = 0;
  species Pls in default_compartment = 0;
  species Pln in default_compartment = 0;
  species sIgM in default_compartment = 0;
  species nIgM in default_compartment = 0;
  species sIgG in default_compartment = 0;
  species nIgG in default_compartment = 0;

  // Parameters:
  dE = 10^(-3);
  bE = 3*10^(-6);
  aE = 5*10^(-2);
  drt = 30;
  g = 0.15*900;
  pV = 19;
  cV = 1;
  bD = 10^(-2);
  D0 = 10^3;
  dD = 2.9;
  kD = 0.5;
  dDm = 0.5;
  dC = 10.1*10^(-3);
  Tc0 = 5*10^2;
  rT1 = 1.3;
  pT2 = 600;
  dT1 = 5;
  dT2 = 2000;
  sTh1 = 2.5;
  pTh1 = 4;
  dTh1 = 0.03;
  mTh = 0.25;
  sTh2 = 0.001;
  pTh2 = 0.0012;
  r = 0.2;
  dB = 0.0009;
  B0 = 1*10^3;
  rB1 = 100;
  h = 100;
  rB2 = 2*10^5;
  pS = 10^(-1);
  pL = 8*10^(-3);
  dS = 0.002;
  dL = 0.02;
  d = 2.4*10^(-2);
  v = 0.5;
  b = 2.4*10^(-4);
  pAS = 0.2;
  dM = 0.2;
  dG = 0.04;
  eE = 0.05;
  eV = 16;
  E0 = 5*10^5;
  V0 = 10;
  kE = 1.19*10^(-3)/900;
  Kev = Tc0;
  tC = 0.5;
  tD = 1;
  rT2 = 1;
  pAL = 0.3;

  // Reactions:
  J1: D -> E; dE*D;
  J2: E -> D; dE*E;
  J3: E -> Ev; bE*V*E;  // modifiers: V
  J4: Ev -> E; aE*Ev;
  J5: Ev -> D; dE*Ev;
  J6: Ev -> D; drt*g*Tc*Ev/(1000 + Ev + g*Tc);  // modifiers: Tc
  J7: -> V; pV*Ev;  // modifiers: Ev
  J8: V -> ; cV*V;
  J9: -> Da; bD*V*(D0 - Da);  // modifiers: V
  J10: Da -> ; dD*Da;
  J11: -> Dm; kD*Da;  // modifiers: Da
  J12: Dm -> ; dDm*Dm;
  J13: -> Tc; dC*Tc0;
  J14: Tc -> ; dC*Tc;
  J15: -> Tc; rT1*Dm*Tc/(Dm + pT2);  // modifiers: Dm
  J16: Tc -> ; dT1*Tc*Dm/(Dm + dT2);  // modifiers: Dm
  J17: -> Th1; sTh1*Th1/(1 + Th2)^2;  // modifiers: Th2
  J18: -> Th1; pTh1*Dm*Th1^2/(1 + Th2)^2;  // modifiers: Dm, Th2
  J19: Th1 -> ; dTh1*Dm*Th1^3/(1 + Th2);  // modifiers: Dm, Th2
  J20: Th1 -> ; mTh*Th1;
  J21: -> Th2; sTh2*Th2/(1 + Th2);
  J22: -> Th2; pTh2*(r + Th1)*Dm*Th2^2/((1 + Th2)*(1 + Th1 + Th2));  // modifiers: Dm, Th1
  J23: Th2 -> ; mTh*Th2;
  J24: -> B; dB*B0;
  J25: B -> ; dB*B;
  J26: -> B; rB1*B*(Dm + h*Th2)/(Dm + h*Th2 + rB2);  // modifiers: Dm, Th2
  J27: B -> Pss; pS*B;
  J28: B -> Psn; pS*B;
  J29: B -> Pls; pL*B*Th2;  // modifiers: Th2
  J30: B -> Pln; pL*B*Th2;  // modifiers: Th2
  J31: Pss -> ; dS*Pss;
  J32: Psn -> ; dS*Psn;
  J33: Pls -> ; dL*Pls;
  J34: Pln -> ; dL*Pln;
  J35: Pss -> Pls; d*(1 - v)*Pss;
  J36: Psn -> Pln; d*(1 - v)*Psn;
  J37: -> Pss; b*v*Pss;
  J37a: -> Pls; b*v*Pls;
  J38: -> Psn; b*v*Psn;
  J38a: -> Pln; b*v*Pln;
  J39: Pls -> Pss; d*(1 - v)*Pls;
  J40: Pln -> Psn; d*(1 - v)*Pln;
  J41: -> sIgM; pAS*Pss;  // modifiers: Pss
  J42: -> nIgM; pAS*Psn;  // modifiers: Psn
  J43: -> sIgG; pAS*Pls;  // modifiers: Pls
  J44: -> nIgG; pAS*Pln;  // modifiers: Pln
  J45: sIgM -> ; dM*sIgM;
  J46: sIgG -> ; dG*sIgG;
  J47: nIgM -> ; dM*nIgM;
  J48: nIgG -> ; dG*nIgG;
  J49: Ev + nIgM -> D; eE*Ev*nIgM;
  J50: Ev + nIgG -> D; eE*Ev*nIgG;
  J51: V + sIgM -> ; eV*V*sIgM;
  J52: V + sIgG -> ; eV*V*sIgG;
end
